*Heading
** Job name: fundation-3d-ns-uncoupled-dt-1e-3 Model name: Fundation-NS-3D-uncoupled
** Generated by: Abaqus/CAE 2018.HF3
*Preprint, echo=NO, model=NO, history=NO, contact=NO
**
** PARTS
**
*Part, name=fundation
*Node
      1,          30.,           2.,          24.
      2,          30.,           0.,          24.
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*Element, type=C3D8
  1,  74,  86, 352, 253,   1,   2,  17,  34
  2, 253, 352, 353, 254,  34,  17,  18,  33
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*Nset, nset=Set-x
   9,  10,  11,  12,  13,  14
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*Elset, elset=Set-x
 289, 290, 291, 292, 293, 294
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*Nset, nset=Set-y, generate
    1,  1066,     1
*Elset, elset=Set-y, generate
   1,  480,    1
*Nset, nset=Set-z
   5,   6,   7,   8,   9,  11
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*Elset, elset=Set-z
 111, 112, 113, 114, 115, 116
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*Nset, nset=Set-all, generate
    1,  1066,     1
*Elset, elset=Set-all, generate
   1,  480,    1
** Section: Section-1
*Solid Section, elset=Set-all, material=NorSand
,
*End Part
**
**
** ASSEMBLY
**
*Assembly, name=Assembly
**
*Instance, name=fundation-1, part=fundation
*End Instance
**
*Nset, nset=Set-ground, instance=fundation-1
   1,   2,   3,   4,  10,  12
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*Elset, elset=Set-ground, instance=fundation-1
   1,   2,   3,   4,   5,   6
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*Nset, nset=Set-load, instance=fundation-1
  1,  2,  3,  4, 17, 18
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*Elset, elset=Set-load, instance=fundation-1, generate
  1,  10,   1
*End Assembly
*Amplitude, name=Amp-1
             0.,              0.,              1.,              1.
**
** MATERIALS
**
*Material, name=Mohr-Coulomb
*Density
1243.,
*Elastic
 9e+06, 0.15
*Mohr Coulomb
40.,0.
*Mohr Coulomb Hardening
200.,0.
*Material, name=NorSand
*Density
1243.,
*Depvar
      8,
*User Material, constants=13
 0.875,  0.03,  1.27,  0.35,  100.,    4., 3e+07,    1.
  0.15, 1.001,  0.02,  100.,    1.
**
** BOUNDARY CONDITIONS
**
** Name: BC-1 Type: Displacement/Rotation
*Boundary
fundation-1.Set-x, 1, 1
** Name: BC-2 Type: Displacement/Rotation
*Boundary
fundation-1.Set-y, 2, 2
** Name: BC-3 Type: Displacement/Rotation
*Boundary
fundation-1.Set-z, 1, 1
fundation-1.Set-z, 2, 2
fundation-1.Set-z, 3, 3
*Initial Conditions, Type=Stress, file=fundation-3d-mc.odb, step=1
** ----------------------------------------------------------------
**
** STEP: Step-1
**
*Step, name=Step-1, nlgeom=NO
*Static
1e-06, 0.05, 5e-07, 0.01
*Solution Technique, type=QUASI-NEWTON
**
** LOADS
**
** Name: Load-1   Type: Gravity
*Dload
fundation-1.Set-all, GRAV, 9.81, 0., 0., -1.
**
** OUTPUT REQUESTS
**
*Restart, write, frequency=0
**
** FIELD OUTPUT: F-Output-1
**
*Output, field, time interval=0.001
*Node Output
RT, U
*Element Output, directions=YES
LE, S, SDV
**
** HISTORY OUTPUT: H-Output-1
**
*Output, history, variable=PRESELECT
*End Step
** ----------------------------------------------------------------
**
** STEP: Step-2
**
*Step, name=Step-2, nlgeom=YES, inc=100000000
*Static
1e-05, 1., 1e-15, 0.001
*Solution Technique, type=QUASI-NEWTON
**
** BOUNDARY CONDITIONS
**
** Name: BC-4 Type: Displacement/Rotation
*Boundary, amplitude=Amp-1
Set-load, 1, 1
Set-load, 3, 3, -0.15
**
** OUTPUT REQUESTS
**
*Restart, write, frequency=0
**
** FIELD OUTPUT: F-Output-1
**
*Output, field, time interval=0.001
*Node Output
RT, U
*Element Output, directions=YES
LE, S, SDV
**
** HISTORY OUTPUT: H-Output-1
**
*Output, history, variable=PRESELECT
*End Step
