*Heading
** Job name: 200416_eng Model name: 200416_eng
** Generated by: Abaqus/CAE 2018
*Preprint, echo=NO, model=NO, history=NO, contact=NO
**
** PARTS
**
*Part, name=Domain
*Node
      1, -0.319999993,  0.643012702, 0.0250000004
      2, -0.319999993,  0.643012702,           0.
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*Element, type=EC3D8R
  1,   94,  549, 2229,  523,    1,   25,  423,   46
  2,  549,  550, 2230, 2229,   25,   26,  424,  423
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*Nset, nset=front
    1,    5,    6,    7,   10,   12
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*Elset, elset=front
    1,    6,   11,   16,   21,   26
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*Nset, nset=bottom
   13,   14,   15,   16,   18,   20
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*Elset, elset=bottom
  441,  442,  443,  444,  445,  446
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*Nset, nset=outlet
   14,   15,   18,   20,   98,   99
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*Elset, elset=outlet
  841,  842,  843,  844,  845,  846
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*Nset, nset=top
    1,    2,    7,    8,   21,   23
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*Elset, elset=top
    1,    2,    3,    4,    5,   71
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*Nset, nset=all, generate
    1,  4416,     1
*Elset, elset=all, generate
    1,  3375,     1
*Nset, nset=back
    2,    3,    4,    8,    9,   11
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*Elset, elset=back
    5,   10,   15,   20,   25,   30
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*Nset, nset=material
    9,   10,   11,   12,   14,   15
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*Elset, elset=material
  451,  452,  453,  454,  455,  456
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*Nset, nset=sym
   17,   18,   19,   20,   21,   22
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*Elset, elset=sym
  463,  476,  489,  502,  515,  528
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*Elset, elset=_surf_bottom_S2, internal, generate
 441,  450,    1
*Elset, elset=_surf_bottom_S5, internal
  841,  842,  843,  844,  845,  846
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*Surface, type=ELEMENT, name=surf_bottom
_surf_bottom_S2, S2
_surf_bottom_S5, S5
*Elset, elset=_surf_top_S4, internal, generate
 2468,  2660,     3
*Elset, elset=_surf_top_S3, internal
  1,  2,  3,  4,  5, 71, 72, 73, 74, 75
*Surface, type=ELEMENT, name=surf_top
_surf_top_S4, S4
_surf_top_S3, S3
** Section: EULsection
*Eulerian Section, elset=all
engineered, lalm-1
*Surface, type=EULERIAN MATERIAL, name=lalm-1
lalm-1
*End Part
**
*Part, name=Hopper
*Node
      1, -0.300000012,  0.693012714, 0.0250000004
      2, -0.300000012,  0.433012694, 0.0250000004
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*Element, type=R3D4
 1,   1,   7, 115,  46
 2,   7,   8, 116, 115
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*Node
    307, -0.0500000007,           0., 0.0125000002
*Nset, nset=Hopper-RefPt_, internal
307,
*Nset, nset=RP
 307,
*Elset, elset=_inner_SPOS, internal, generate
   1,  250,    1
*Surface, type=ELEMENT, name=inner
_inner_SPOS, SPOS
*Elset, elset=Hopper, generate
   1,  250,    1
*End Part
**
**
** ASSEMBLY
**
*Assembly, name=Assembly
**
*Instance, name=Domain-1, part=Domain
     -0.0125,           0.,           0.
     -0.0125,           0.,           0., 0.564850269189626, 0.577350269189626, 0.577350269189626,         120.
*End Instance
**
*Instance, name=Hopper-1, part=Hopper
     -0.0125, -7.65404249467096e-19, 7.65404249467096e-19
     -0.0125, -7.65404249467096e-19, 7.65404249467096e-19, 0.564850269189626, 0.577350269189626, 0.577350269189626,         120.
*End Instance
**
*Rigid Body, ref node=Hopper-1.Hopper-RefPt_, elset=Hopper-1.Hopper
*End Assembly
*Amplitude, name=smo_g, definition=SMOOTH STEP
             0.,              0.,              1.,              1.,              2.,              1.
**
** MATERIALS
**
*Material, name=LALM
*Density
290.,
*Depvar
      3,
*User Material, constants=12
 1.381, 0.5003, 1.0623,   47.3,187549.,     1.,    0.3,    0.3
     0.,     0.,     0.,     0.
*Material, name=MC
*Density
300.,
*Elastic
 1.86258e+06, 0.04
*Mohr Coulomb
 47.3,1.
*Mohr Coulomb Hardening
 0.1,0.
*Material, name=engineered
*Density
200.,
*Depvar
      3,
*User Material, constants=12
 1.424,      0.5911,      1.1867,        49.6, 1.03462e+06,         0.5,        0.35,         0.4
          0.,          0.,          0.,          0.
*Initial Conditions, Type=Solution
Domain-1.all, 0.7102,0.0001,0
**
** INTERACTION PROPERTIES
**
*Surface Interaction, name=Friction
*Friction
 0.15,
*Surface Behavior, pressure-overclosure=HARD
*Surface Interaction, name=Frictionless
*Friction
0.,
*Surface Behavior, pressure-overclosure=HARD
**
** BOUNDARY CONDITIONS
**
** Name: back Type: Symmetry/Antisymmetry/Encastre
*Boundary
Domain-1.back, XSYMM
** Name: front Type: Symmetry/Antisymmetry/Encastre
*Boundary
Domain-1.front, XSYMM
** Name: middle Type: Symmetry/Antisymmetry/Encastre
*Boundary
Domain-1.sym, YSYMM
**
** PREDEFINED FIELDS
**
** Name: Mat_assign   Type: Material assignment
*Initial Conditions, type=VOLUME FRACTION
Domain-1.material, Domain-1.lalm-1, 1.
** Name: initial_10   Type: Stress
*Initial Conditions, type=STRESS
Domain-1.material, -10., -10., -10., 0., 0., 0.
**
** INTERACTIONS
**
** Interaction: General
*Contact, op=NEW
*Contact Inclusions
Hopper-1.inner , Domain-1.lalm-1
*Contact Property Assignment
 ,  , Friction
** ----------------------------------------------------------------
**
** STEP: Gravity
**
*Step, name=Gravity, nlgeom=YES
*Dynamic, Explicit, direct user control
1e-05, 2.
*Bulk Viscosity
0.06, 1.2
**
** BOUNDARY CONDITIONS
**
** Name: Hopper Type: Displacement/Rotation
*Boundary
Hopper-1.RP, 1, 1
Hopper-1.RP, 2, 2
Hopper-1.RP, 3, 3
Hopper-1.RP, 4, 4
Hopper-1.RP, 5, 5
Hopper-1.RP, 6, 6
** Name: bottom_outflow Type: Eulerian boundary
*Eulerian Boundary, inflow=NONE, outflow=NONE
Domain-1.surf_bottom
** Name: top_inflow Type: Eulerian boundary
*Eulerian Boundary, inflow=NONE, outflow=NONE
Domain-1.surf_top
**
** LOADS
**
** Name: Gravity   Type: Gravity
*Dload, amplitude=smo_g
Domain-1.material, GRAV, 9.81, 0., 0., -1.
**
** OUTPUT REQUESTS
**
*Restart, write, number interval=1, time marks=NO
**
** FIELD OUTPUT: F-Output-1
**
*Output, field, time interval=0.05
*Node Output
RF, U, V
*Element Output, directions=YES
DENSITY, DENSITYVAVG, EVF, LE, MVF, S, SDV, SVAVG
*Contact Output
CFORCE, CSTRESS
**
** HISTORY OUTPUT: H-Output-1
**
*Output, history, variable=PRESELECT
*End Step
** ----------------------------------------------------------------
**
** STEP: Discharging
**
*Step, name=Discharging, nlgeom=YES
*Dynamic, Explicit
, 16.,, 5e-06
*Bulk Viscosity
0.06, 1.2
**
** BOUNDARY CONDITIONS
**
** Name: bottom_outflow Type: Eulerian boundary
*Eulerian Boundary, inflow=NONE, outflow=ZERO PRESSURE
Domain-1.surf_bottom
** Name: top_inflow Type: Eulerian boundary
*Eulerian Boundary, inflow=VOID, outflow=ZERO PRESSURE
Domain-1.surf_top
**
** LOADS
**
** Name: Gravity   Type: Gravity
**
** OUTPUT REQUESTS
**
*Restart, write, overlay, number interval=16, time marks=NO
**
** FIELD OUTPUT: F-Output-1
**
*Output, field, time interval=0.05
*Node Output
RF, U, V
*Element Output, directions=YES
DENSITY, DENSITYVAVG, EVF, LE, MVF, S, SDV, SVAVG
*Contact Output
CFORCE, CSTRESS
**
** HISTORY OUTPUT: H-Output-1
**
*Output, history, variable=PRESELECT
*End Step
