*Heading
** Job name: LALM-M1-DPC-eta-30-pre-60 Model name: Schulze-M1-DPC-eta-30-LALM
** Generated by: Abaqus/CAE 2018.HF3
*Preprint, echo=NO, model=NO, history=NO, contact=NO
**
** PARTS
**
*Part, name=Biomass
*Node
      1,  0.100000001,           0.,           0.
      2,  0.100000001, 0.0299999993,           0.
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*Element, type=C3D8R
   1,   843,   842,    46,    45,  7583,  7582,  2115,  2116
   2,   827,    14,    13,   822,  7567,  2812,  2813,  7562
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*Nset, nset=Set-1, generate
     1,  21712,      1
*Elset, elset=Set-1, generate
     1,  18644,      1
*Nset, nset=Set-ale
     2,     3,     5,     8,     9,    10
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*Elset, elset=Set-ale, generate
 13453,  18644,      1
** Section: DPC
*Solid Section, elset=Set-1, controls=EC-1, material=MDPC_LALM_pine
,
*End Part
**
*Part, name=Container-bottom
*End Part
**
*Part, name=Container-inner
*End Part
**
*Part, name=Container-outer
*End Part
**
*Part, name=Container-top
*End Part
**
**
** ASSEMBLY
**
*Assembly, name=Assembly
**
*Instance, name=Biomass-1, part=Biomass
*End Instance
**
*Instance, name=Container-bottom-1, part=Container-bottom
*Node
      1,           0.,           0., -6.73555719e-18
*Nset, nset=Container-bottom-1-RefPt_, internal
1,
*Nset, nset=RP
 1,
*Surface, type=REVOLUTION, name=Surf-master-bottom
START,         0.04,           0.
 LINE,         0.05,           0.
 LINE,          0.1,           0.
 LINE,         0.11,           0.
*Rigid Body, ref node=Container-bottom-1-RefPt_, analytical surface=Surf-master-bottom
*Element, type=MASS, elset=RP_Inertia-1_MASS_
1, 1
*Mass, elset=RP_Inertia-1_MASS_
0.001,
*Element, type=ROTARYI, elset=RP_Inertia-1_ROTI_
2, 1
*Rotary Inertia, elset=RP_Inertia-1_ROTI_
0.001, 0.001, 0.001, 0., 0., 0.
*End Instance
**
*Instance, name=Container-inner-1, part=Container-inner
*Node
      1,           0., 0.0399999991, -3.06161692e-18
*Nset, nset=Container-inner-1-RefPt_, internal
1,
*Nset, nset=RP
 1,
*Surface, type=REVOLUTION, name=Surf-master-inner
START,         0.05,         0.04
 LINE,         0.05,           0.
*Rigid Body, ref node=Container-inner-1-RefPt_, analytical surface=Surf-master-inner
*Element, type=MASS, elset=RP_Inertia-1_MASS_
1, 1
*Mass, elset=RP_Inertia-1_MASS_
0.001,
*Element, type=ROTARYI, elset=RP_Inertia-1_ROTI_
2, 1
*Rotary Inertia, elset=RP_Inertia-1_ROTI_
0.001, 0.001, 0.001, 0., 0., 0.
*End Instance
**
*Instance, name=Container-outer-1, part=Container-outer
*Node
      1,           0., 0.0399999991, -6.12323385e-18
*Nset, nset=Container-outer-1-RefPt_, internal
1,
*Nset, nset=RP
 1,
*Surface, type=REVOLUTION, name=Surf-master-outer
START,          0.1,           0.
 LINE,          0.1,         0.04
*Rigid Body, ref node=Container-outer-1-RefPt_, analytical surface=Surf-master-outer
*Element, type=MASS, elset=RP_Inertia-1_MASS_
1, 1
*Mass, elset=RP_Inertia-1_MASS_
0.001,
*Element, type=ROTARYI, elset=RP_Inertia-1_ROTI_
2, 1
*Rotary Inertia, elset=RP_Inertia-1_ROTI_
0.001, 0.001, 0.001, 0., 0., 0.
*End Instance
**
*Instance, name=Container-top-1, part=Container-top
*Node
      1,           0., 0.0399999991, -6.73555719e-18
*Nset, nset=Container-top-1-RefPt_, internal
1,
*Nset, nset=RP
 1,
*Surface, type=REVOLUTION, name=Surf-master-top
START,         0.11,         0.04
 LINE,          0.1,         0.04
 LINE,         0.05,         0.04
 LINE,         0.04,         0.04
*Rigid Body, ref node=Container-top-1-RefPt_, analytical surface=Surf-master-top
*Element, type=MASS, elset=RP_Inertia-1_MASS_
1, 1
*Mass, elset=RP_Inertia-1_MASS_
0.001,
*Element, type=ROTARYI, elset=RP_Inertia-1_ROTI_
2, 1
*Rotary Inertia, elset=RP_Inertia-1_ROTI_
0.001, 0.001, 0.001, 0., 0., 0.
*End Instance
**
*Nset, nset=Set-bottom, instance=Biomass-1
    1,    4,    6,    7,   39,   40
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*Elset, elset=Set-bottom, instance=Biomass-1
     1,     6,     8,    13,    21,    22
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*Nset, nset=Set-top, instance=Biomass-1
    9,   10,   11,   12,  557,  558
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*Elset, elset=Set-top, instance=Biomass-1
 13468, 13469, 13470, 13482, 13485, 13489
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*Elset, elset=_Surf-slave-bottom_S5, internal, instance=Biomass-1
     1,    13,    21,    26,    27,    30
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*Elset, elset=_Surf-slave-bottom_S4, internal, instance=Biomass-1, generate
     6,  13344,    114
*Elset, elset=_Surf-slave-bottom_S6, internal, instance=Biomass-1, generate
     8,  13346,    114
*Elset, elset=_Surf-slave-bottom_S3, internal, instance=Biomass-1
    22,    34,   136,   148,   250,   262
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*Surface, type=ELEMENT, name=Surf-slave-bottom
_Surf-slave-bottom_S5, S5
_Surf-slave-bottom_S4, S4
_Surf-slave-bottom_S6, S6
_Surf-slave-bottom_S3, S3
*Elset, elset=_Surf-slave-inner_S4, internal, instance=Biomass-1
     9,    10,    23,    50,   123,   124
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*Elset, elset=_Surf-slave-inner_S6, internal, instance=Biomass-1
    21,    25,    44,    52,   135,   139
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*Surface, type=ELEMENT, name=Surf-slave-inner
_Surf-slave-inner_S4, S4
_Surf-slave-inner_S6, S6
*Elset, elset=_Surf-slave-outer_S3, internal, instance=Biomass-1, generate
 13464,  18612,     44
*Elset, elset=_Surf-slave-outer_S4, internal, instance=Biomass-1
     2,     5,    26,    38,    39,   116
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*Elset, elset=_Surf-slave-outer_S6, internal, instance=Biomass-1
     3,    37,    42,   117,   151,   156
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*Elset, elset=_Surf-slave-outer_S5, internal, instance=Biomass-1, generate
 13467,  18615,     44
*Surface, type=ELEMENT, name=Surf-slave-outer
_Surf-slave-outer_S3, S3
_Surf-slave-outer_S4, S4
_Surf-slave-outer_S6, S6
_Surf-slave-outer_S5, S5
*Elset, elset=_Surf-slave-top_S5, internal, instance=Biomass-1, generate
 13468,  18616,     44
*Elset, elset=_Surf-slave-top_S6, internal, instance=Biomass-1
 13469, 13470, 13513, 13514, 13557, 13558
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*Elset, elset=_Surf-slave-top_S3, internal, instance=Biomass-1, generate
 13482,  18630,     44
*Elset, elset=_Surf-slave-top_S4, internal, instance=Biomass-1
 13485, 13489, 13490, 13491, 13492, 13493
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*Surface, type=ELEMENT, name=Surf-slave-top
_Surf-slave-top_S5, S5
_Surf-slave-top_S6, S6
_Surf-slave-top_S4, S4
_Surf-slave-top_S3, S3
*Nset, nset="_T-Datum csys-1", internal
Container-bottom-1.RP,
Container-inner-1.RP,
Container-outer-1.RP,
Container-top-1.RP,
*Transform, nset="_T-Datum csys-1", type=C
          0.,           0.,           0.,           0.,           1.,           0.
** Constraint: Constraint-2
*Tie, name=Constraint-2, adjust=yes
Surf-slave-bottom, Container-bottom-1.Surf-master-bottom
** Constraint: Constraint-3
*Tie, name=Constraint-3, adjust=yes
Surf-slave-top, Container-top-1.Surf-master-top
*End Assembly
**
** ELEMENT CONTROLS
**
*Section Controls, name=EC-1, DISTORTION CONTROL=NO, hourglass=COMBINED
1., 1., 1.
*Amplitude, name=Amp-g-smooth
             0.,              0.,              1.,              1.
*Amplitude, name=smooth-pressure, time=TOTAL TIME, definition=SMOOTH STEP
             0.,              0.,              1.,              0.,             4.5,              1.,              5.,              1.
*Amplitude, name=unload, definition=SMOOTH STEP
             0.,              0.,              1.,              1.
**
** MATERIALS
**
*Material, name=MDPC_LALM_pine
*Cap Plasticity, dependencies=1
 78.26994923, 53.9352,    0.12,      0.,    0.01,      1., ,      1.
 184.2605055, 53.9352,    0.15,      0.,    0.01,      1., , 1.05013
 419.0703532, 53.9352,    0.17,      0.,    0.01,      1., , 1.08599
 828.3569627, 53.9352,    0.19,      0.,    0.01,      1., ,   1.121
 1312.652274, 53.9352,    0.21,      0.,    0.01,      1., , 1.14699
 2026.86556,  53.9352,    0.21,      0.,    0.01,      1., , 1.16843
*Cap Hardening
  510.,     0.
  550.,  0.015
  630.,   0.03
  700.,  0.042
 1600.,  0.054
 3200., 0.0605
10000.,  0.061
*Density
 227.9,
*Depvar
      4,
*Elastic, dependencies=1
     132567.,    0.04, ,      1.
     480050.,    0.04, , 1.05013
     715051.,    0.04, , 1.08599
 1.86258e+06,    0.04, ,   1.121
 3.33403e+06,    0.04, , 1.14699
   5.161e+06,    0.04, , 1.16843
**
** INTERACTION PROPERTIES
**
*Surface Interaction, name=Separation
*Friction
 0.2675,
*Surface Behavior, pressure-overclosure=HARD
**
** BOUNDARY CONDITIONS
**
** Name: BC-1 Type: Displacement/Rotation
*Boundary
Container-bottom-1.RP, 1, 1
Container-bottom-1.RP, 2, 2
Container-bottom-1.RP, 3, 3
Container-bottom-1.RP, 4, 4
Container-bottom-1.RP, 5, 5
Container-bottom-1.RP, 6, 6
** Name: BC-2 Type: Displacement/Rotation
*Boundary
Container-inner-1.RP, 1, 1
Container-inner-1.RP, 2, 2
Container-inner-1.RP, 3, 3
Container-inner-1.RP, 4, 4
Container-inner-1.RP, 5, 5
Container-inner-1.RP, 6, 6
** Name: BC-3 Type: Displacement/Rotation
*Boundary
Container-outer-1.RP, 1, 1
Container-outer-1.RP, 2, 2
Container-outer-1.RP, 3, 3
Container-outer-1.RP, 4, 4
Container-outer-1.RP, 5, 5
Container-outer-1.RP, 6, 6
** Name: Fix_u2 Type: Displacement/Rotation
*Boundary
Container-top-1.RP, 1, 1
Container-top-1.RP, 2, 2
Container-top-1.RP, 4, 4
Container-top-1.RP, 5, 5
Container-top-1.RP, 6, 6
** ----------------------------------------------------------------
**
** STEP: Compression
**
*Step, name=Compression, nlgeom=YES
*Dynamic, Explicit
, 5.
*Bulk Viscosity
0.06, 1.2
*Adaptive Mesh Controls, name=Ada-1
1., 0., 0.
**
** LOADS
**
** Name: Gravity   Type: Body force
*Dload, amplitude=Amp-g-smooth
Biomass-1.Set-1, BY, -9.81
** Name: Normal_100   Type: Concentrated force
*Cload, op=NEW, amplitude=smooth-pressure
Container-top-1.RP, 2, 0.
Container-top-1.RP, 3, -35.3429
**
** INTERACTIONS
**
** Interaction: Int-1
*Contact Pair, interaction=Separation, mechanical constraint=KINEMATIC, cpset=Int-1
Container-inner-1.Surf-master-inner, Surf-slave-inner
** Interaction: Int-2
*Contact Pair, interaction=Separation, mechanical constraint=KINEMATIC, cpset=Int-2
Container-outer-1.Surf-master-outer, Surf-slave-outer
**
** OUTPUT REQUESTS
**
*Restart, write, number interval=1, time marks=NO
**
** FIELD OUTPUT: F-Output-1
**
*Output, field, time interval=0.1, time marks=YES
*Node Output, GLOBAL=NO
RF, U
*Element Output, directions=YES
DENSITY, LE, PE, PEEQ, S
*Contact Output
CSTRESS,
**
** HISTORY OUTPUT: H-Output-1
**
*Output, history, variable=PRESELECT
*End Step
** ----------------------------------------------------------------
**
** STEP: Shear
**
*Step, name=Shear, nlgeom=YES
*Dynamic, Explicit
, 20.
*Bulk Viscosity
0.06, 1.2
**
** BOUNDARY CONDITIONS
**
** Name: BC-1 Type: Displacement/Rotation
*Boundary, op=NEW
Container-bottom-1.RP, 1, 1
Container-bottom-1.RP, 2, 2
Container-bottom-1.RP, 3, 3
Container-bottom-1.RP, 4, 4
Container-bottom-1.RP, 5, 5
** Name: BC-2 Type: Displacement/Rotation
*Boundary, op=NEW
Container-inner-1.RP, 1, 1
Container-inner-1.RP, 2, 2
Container-inner-1.RP, 3, 3
Container-inner-1.RP, 4, 4
Container-inner-1.RP, 5, 5
** Name: BC-3 Type: Displacement/Rotation
*Boundary, op=NEW
Container-outer-1.RP, 1, 1
Container-outer-1.RP, 2, 2
Container-outer-1.RP, 3, 3
Container-outer-1.RP, 4, 4
Container-outer-1.RP, 5, 5
** Name: Fix_u2 Type: Displacement/Rotation
*Boundary, op=NEW
Container-top-1.RP, 1, 1
Container-top-1.RP, 2, 2
Container-top-1.RP, 4, 4
Container-top-1.RP, 5, 5
Container-top-1.RP, 6, 6
** Name: Rotate-B Type: Velocity/Angular velocity
*Boundary, op=NEW, type=VELOCITY
Container-bottom-1.RP, 6, 6, 0.01
** Name: Rotate-IR Type: Velocity/Angular velocity
*Boundary, op=NEW, type=VELOCITY
Container-inner-1.RP, 6, 6, 0.01
** Name: Rotate-OR Type: Velocity/Angular velocity
*Boundary, op=NEW, type=VELOCITY
Container-outer-1.RP, 6, 6, 0.01
*Adaptive Mesh, elset=Biomass-1.Set-ale, controls=Ada-1, op=NEW
**
** LOADS
**
** Name: Gravity   Type: Body force
*Dload
** Name: Normal_100   Type: Concentrated force
*Cload, op=NEW
Container-top-1.RP, 2, 0.
Container-top-1.RP, 3, -35.3429
**
** OUTPUT REQUESTS
**
*Restart, write, number interval=1, time marks=NO
**
** FIELD OUTPUT: F-Output-1
**
*Output, field, time interval=0.1, time marks=YES
*Node Output, GLOBAL=NO
RF, U
*Element Output, directions=YES
DENSITY, LE, PE, PEEQ, S
*Contact Output
CSTRESS,
**
** HISTORY OUTPUT: H-Output-1
**
*Output, history, variable=PRESELECT
*End Step
** ----------------------------------------------------------------
